*Heading
** Job name: section Model name: Model-1
** Generated by: Abaqus/CAE 6.14-4
*Preprint, echo=NO, model=NO, history=NO, contact=NO
**
** PARTS
**
*Part, name=SECTION
*End Part
**
*Part, name=die
*Node
      1, 0.0399999991,           0.
      2,  0.039888151, 0.00298920367
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*Element, type=R2D2
 1,  1,  2
 2,  2,  3
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*Node
     23,  2.44929358e-18, 0.0399999991,           0.
*Nset, nset=die-RefPt_, internal
23,
*Elset, elset=die, generate
  1,  21,   1
*End Part
**
**
** ASSEMBLY
**
*Assembly, name=Assembly
**
*Instance, name=SECTION-1, part=SECTION
*Node
      1,           0., 0.0299999993
      2, 0.0299999993,           0.
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*Element, type=CPE4RT
  1,   1,   6,  88,  65
  2,   6,   7,  89,  88
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*Nset, nset=Set-2, generate
   1,  397,    1
*Elset, elset=Set-2, generate
   1,  363,    1
*Orientation, name=Ori-1
1., 0., 0., 0., 1., 0.
3, 0.
** Section: km
*Solid Section, elset=Set-2, orientation=Ori-1, controls=EC-1, material=Lumped
,
*End Instance
**
*Instance, name=die-1, part=die
*End Instance
**
*Nset, nset=Set-59, instance=SECTION-1
  3,  4, 36, 37, 38, 39
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*Elset, elset=Set-59, instance=SECTION-1, generate
 199,  220,    1
*Nset, nset=all_km, instance=SECTION-1, generate
   1,  397,    1
*Elset, elset=all_km, instance=SECTION-1, generate
   1,  363,    1
*Nset, nset=dat, instance=SECTION-1, generate
 3,  5,  1
*Nset, nset=die_s, instance=die-1, generate
  1,  22,   1
*Elset, elset=die_s, instance=die-1, generate
  1,  21,   1
*Elset, elset=e_dat, instance=SECTION-1
 199, 220, 253
*Nset, nset=km_s, instance=SECTION-1
  3,  4, 36, 37, 38, 39
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*Elset, elset=km_s, instance=SECTION-1, generate
 199,  220,    1
*Nset, nset=refp, instance=die-1
 23,
*Nset, nset=x0, instance=SECTION-1
  1,  4,  5, 57, 58, 59
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*Elset, elset=x0, instance=SECTION-1
   1,  23,  45,  67,  89, 111
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*Nset, nset=y_symm, instance=SECTION-1
  2,  3,  5, 27, 28, 29
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*Elset, elset=y_symm, instance=SECTION-1
  22,  44,  66,  88, 110, 132
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*Elset, elset=_die_s1_SPOS, internal, instance=die-1, generate
  1,  21,   1
*Surface, type=ELEMENT, name=die_s1
_die_s1_SPOS, SPOS
*Elset, elset=_km_S1_S3, internal, instance=SECTION-1, generate
 199,  220,    1
*Surface, type=ELEMENT, name=km_S1
_km_S1_S3, S3
*Rigid Body, ref node=die-1.die-RefPt_, elset=die-1.die
*End Assembly
**
** ELEMENT CONTROLS
**
*Section Controls, name=EC-1, hourglass=ENHANCED
1., 1., 1.
**
** MATERIALS
**
*Material, name=Lumped
*Conductivity, type=ORTHO
 0.5689, 0.5689, 0.5689
*Density
2105.,
*Depvar
     79,
*Expansion, type=ORTHO, user, zero=30.
 1e-05,
*Heat Generation
*Specific Heat, dependencies=1
 975.962,       0.,       0.
 981.061,   3.0303,       0.
  986.16,  6.06061,       0.
 991.259,  9.09091,       0.
 996.358,  12.1212,       0.
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 1533.65,     300.,       1.
*User Defined Field
*User Material, constants=7
 1.64e+08, 7.308e+10,      0.22,  5.04e-06,  5.76e-05,      0.65,        3.
**
** INTERACTION PROPERTIES
**
*Surface Interaction, name=norm
1.,
*Surface Behavior, pressure-overclosure=HARD
**
** BOUNDARY CONDITIONS
**
** Name: all_dofs Type: Displacement/Rotation
*Boundary
refp, 1, 1
refp, 2, 2
refp, 6, 6
** Name: x_symm Type: Symmetry/Antisymmetry/Encastre
*Boundary
x0, XSYMM
** Name: y_symm Type: Symmetry/Antisymmetry/Encastre
*Boundary
y_symm, YSYMM
**
** PREDEFINED FIELDS
**
** Name: T0   Type: Temperature
*Initial Conditions, type=TEMPERATURE
all_km, 50.
**
** INTERACTIONS
**
** Interaction: mech
*Contact Pair, interaction=norm, type=SURFACE TO SURFACE
km_S1, die_s1
** ----------------------------------------------------------------
**
** STEP: die
**
*Step, name=die, nlgeom=YES, inc=1000000
*Coupled Temperature-displacement, creep=none, deltmx=200.
5., 1200., 0.0101068, 10.
**
** INTERACTIONS
**
** Interaction: film
*Sfilm
km_S1, FNU, 0., 0.
**
** OUTPUT REQUESTS
**
*Restart, write, frequency=0
**
** FIELD OUTPUT: F-Output-1
**
*Output, field
*Node Output
NT, U
*Element Output, directions=YES
EE, FV, LE, S, SDV, TEMP, THE
**
** HISTORY OUTPUT: H-Output-1
**
*Output, history
*Element Output, elset=e_dat
EE11, EE12, EE13, EE22, EE23, EE33, EEP, INV3, PRESS, S11, S12, S13, S22, S23, S33, SDV
SP, TEMP, THE11, THE12, THE13, THE22, THE23, THE33, THEP, TRESC
*Energy Output, elset=e_dat
ALLAE, ALLCD, ALLDMD, ALLEE, ALLFD, ALLIE, ALLJD, ALLKE, ALLKL, ALLPD, ALLQB, ALLSD, ALLSE, ALLVD, ALLWK, ETOTAL
*End Step
** ----------------------------------------------------------------
**
** STEP: free0
**
*Step, name=free0, nlgeom=YES, inc=1000
*Coupled Temperature-displacement, creep=none, deltmx=100.
1e-05, 1., 1e-10, 0.1
**
** INTERACTIONS
**
** Interaction: mech
*Model Change, type=CONTACT PAIR, remove
km_S1, die_s1
**
** OUTPUT REQUESTS
**
*Restart, write, frequency=0
**
** FIELD OUTPUT: F-Output-1
**
*Output, field
*Node Output
NT, U
*Element Output, directions=YES
EE, FV, LE, S, SDV, TEMP, THE
**
** HISTORY OUTPUT: H-Output-1
**
*Output, history
*Element Output, elset=e_dat
EE11, EE12, EE13, EE22, EE23, EE33, EEP, INV3, PRESS, S11, S12, S13, S22, S23, S33, SDV
SP, TEMP, THE11, THE12, THE13, THE22, THE23, THE33, THEP, TRESC
*Energy Output, elset=e_dat
ALLAE, ALLCD, ALLDMD, ALLEE, ALLFD, ALLIE, ALLJD, ALLKE, ALLKL, ALLPD, ALLQB, ALLSD, ALLSE, ALLVD, ALLWK, ETOTAL
*End Step
** ----------------------------------------------------------------
**
** STEP: free
**
*Step, name=free, nlgeom=YES, inc=100000
*Coupled Temperature-displacement, creep=none, deltmx=200.
5., 5000., 0.05, 20.
**
** OUTPUT REQUESTS
**
*Restart, write, frequency=0
**
** FIELD OUTPUT: F-Output-1
**
*Output, field
*Node Output
NT, U
*Element Output, directions=YES
EE, LE, S, SDV, TEMP, THE
*Contact Output
CSTRESS,
**
** HISTORY OUTPUT: H-Output-1
**
*Output, history
*Element Output, elset=e_dat
EE11, EE12, EE13, EE22, EE23, EE33, EEP, INV3, PRESS, S11, S12, S13, S22, S23, S33, SDV
SP, TEMP, THE11, THE12, THE13, THE22, THE23, THE33, THEP, TRESC
*Energy Output, elset=e_dat
ALLAE, ALLCD, ALLDMD, ALLEE, ALLFD, ALLIE, ALLJD, ALLKE, ALLKL, ALLPD, ALLQB, ALLSD, ALLSE, ALLVD, ALLWK, ETOTAL
*End Step
